# Solubility Calculation for Oil in Wastewater Feed Stream
# - John M. Clark - Design Pod 6
# Moles of each component (oil/TSS free basis)
# wt. frac.
# Water
# Organic (oil)
# Organic (other)
# Organic (phenol)
# Organic (benzene)
# Organic (toluene)
# TSS (char)
# Ammonium
# Cyanide
F_w := [0.947879441; 0.0000355; 0.04936068; 0.00061; 0.0000249; 0.00000442; 0.000486; 0.001207059; 0.000392]
F_n := [
    F_w(0)/18;
    0;
    F_w(2)/170.33;
    F_w(3)/94.11;
    F_w(4)/78.11;
    F_w(5)/92.14;
    0;
    F_w(7)/18.039;
    F_w(8)/26.017
] = [0.05266; 0; 0.000289794; 6.48178e-6; 3.18781e-7; 4.79705e-8; 0; 6.69139e-5; 1.50671e-5]
# Total moles (free basis)
mol_tot ← 0
for i ∈ 0, 1 .. 8
    mol_tot ← mol_tot + F_n(i)
mol_tot
= 0.0530386
# Mol. frac. (free basis)
# Mol. fraction of oil soluble in water
F_x := [
    F_n(0)/0.053;
    F_n(1)/0.053;
    F_n(2)/0.053;
    F_n(3)/0.053;
    F_n(4)/0.053;
    F_n(5)/0.053;
    F_n(6)/0.053;
    F_n(7)/0.053;
    F_n(8)/0.053
] = [0.993584; 0; 0.00546782; 0.000122298; 6.01474e-6; 9.05103e-7; 0; 0.00126253; 0.000284284]
Sol_x := F_x(2) = 0.00546782
